ω_C1 := 2*π*50*10^3  # Lowest frequence allowed
ω_C2 := 2*π*500*10^3  # Highest frequence allowed
T(s) == (s/(s + ω_C1))*K_G*(ω_C2/(s + ω_C2))
T(s) == (s/(s + 1/(R_1*C_1)))*((R_3 + R_2)/R_2)*(1/(R_4*C_2)/(s + 1/(R_4*C_2)))
# High Pass Filter:
# deciding "random" capacitor to find resistor:
C_1 := 1*10^-9
1/(R_1*C_1) == ω_C1 solve, R_1 → 10000/π = 3183.1
# Low Pass Filter:
# deciding "random" capacitor to find resistor:
(ω_C2/(s + ω_C2)) == (1/(R_4*C_2)/(s + 1/(R_4*C_2)))
C_2 := 180*10^-12
1/(R_4*C_2) == ω_C2 solve, R_4 → 50000/(9*π) = 1768.39
